/prep7

ET,1,SOLID185
MP,EX,1,17000
MP,PRXY,1,0.3

/nopr

/INPUT,'nodedata','txt'
/INPUT,'elementdata','txt'

/gopr

nsel,s,loc,z,0
D,all, , , , , ,ALL, , , , ,

nsel,s,loc,z,4.980000e-02
D,all,UZ,-4.980000e-04

allsel

/Solu

Antype,0
eqslv,pcg
solve


SAVE,'Homo','db'

/exit,nosave
